*Heading
** Job name: Job-1 Model name: Model-1
** Generated by: Abaqus/CAE 2016
*Preprint, echo=NO, model=NO, history=NO, contact=NO
**
** PARTS
**
*Part, name=beam_1D
*End Part
**
**
** ASSEMBLY
**
*Assembly, name=Assembly
**
*Instance, name=beam_1D-1, part=beam_1D
*Node
      1,           0.,           0.
      2, 0.00999999978,           0.
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*Element, type=B21
  1,   1,   2
  2,   2,   3
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*Nset, nset=_PickedSet3, internal, generate
   1,  201,    1
*Elset, elset=_PickedSet3, internal, generate
   1,  200,    1
** Section: Section-1  Profile: Profile-1
*Beam Section, elset=_PickedSet3, material=steel, temperature=GRADIENTS, section=I
0.125, 0.25, 0.118, 0.118, 0.01, 0.01, 0.013
0.,0.,-1.
*End Instance
**
*Nset, nset=_PickedSet4, internal, instance=beam_1D-1
 201,
*Nset, nset=_PickedSet5, internal, instance=beam_1D-1
 1,
*End Assembly
**
** MATERIALS
**
*Material, name=steel
*Elastic
 2.06e+11, 0.3
** ----------------------------------------------------------------
**
** STEP: Step-1
**
*Step, name=Step-1, nlgeom=NO
*Static
1., 1., 1e-05, 1.
**
** BOUNDARY CONDITIONS
**
** Name: BC-1 Type: Displacement/Rotation
*Boundary
_PickedSet5, 1, 1
_PickedSet5, 2, 2
_PickedSet5, 6, 6
**
** LOADS
**
** Name: conforce   Type: Concentrated force
*Cload
_PickedSet4, 2, -10000.
**
** OUTPUT REQUESTS
**
*Restart, write, frequency=0
**
** FIELD OUTPUT: F-Output-1
**
*Output, field, variable=PRESELECT
**
** HISTORY OUTPUT: H-Output-1
**
*Output, history, variable=PRESELECT
*End Step
