*Heading
** Job name: beam_2D Model name: Model-1
** Generated by: Abaqus/CAE 2016
*Preprint, echo=NO, model=NO, history=NO, contact=NO
**
** PARTS
**
*Part, name=Part-1
*End Part
**
**
** ASSEMBLY
**
*Assembly, name=Assembly
**
*Instance, name=Part-1-1, part=Part-1
*Node
      1,           0.,  0.119999997,           0.
      2,           0.,  0.119999997,           2.
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*Element, type=S4R
 1,  1, 13, 50,  4
 2, 13, 14, 49, 50
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*Nset, nset=_PickedSet2, internal
   1,   2,   7,   8,  13,  14
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*Elset, elset=_PickedSet2, internal, generate
 41,  80,   1
*Nset, nset=_PickedSet3, internal
  1,  2,  3,  4, 13, 14
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*Elset, elset=_PickedSet3, internal, generate
  1,  20,   1
*Nset, nset=_PickedSet4, internal
  1,  2,  5,  6, 13, 14
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*Elset, elset=_PickedSet4, internal, generate
 21,  40,   1
*Nset, nset=_PickedSet5, internal
   7,   8,   9,  10,  72,  73
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*Elset, elset=_PickedSet5, internal, generate
  81,  100,    1
*Nset, nset=_PickedSet6, internal
   7,   8,  11,  12,  72,  73
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*Elset, elset=_PickedSet6, internal, generate
 101,  120,    1
** Section: Section-1
*Shell Section, elset=_PickedSet3, material=steel
0.01, 5
** Section: Section-1
*Shell Section, elset=_PickedSet4, material=steel
0.01, 5
** Section: Section-2
*Shell Section, elset=_PickedSet2, material=steel
0.013, 5
** Section: Section-1
*Shell Section, elset=_PickedSet5, material=steel
0.01, 5
** Section: Section-1
*Shell Section, elset=_PickedSet6, material=steel
0.01, 5
*End Instance
**
*Nset, nset=_PickedSet19, internal, instance=Part-1-1
 1, 5
*Elset, elset=_PickedSet19, internal, instance=Part-1-1
 40,
*Nset, nset=_PickedSet20, internal, instance=Part-1-1
 1, 4
*Elset, elset=_PickedSet20, internal, instance=Part-1-1
 1,
*Nset, nset=_PickedSet21, internal, instance=Part-1-1
  1,  8, 71
*Elset, elset=_PickedSet21, internal, instance=Part-1-1
 79, 80
*Nset, nset=_PickedSet22, internal, instance=Part-1-1
 8, 9
*Elset, elset=_PickedSet22, internal, instance=Part-1-1
 100,
*Nset, nset=_PickedSet23, internal, instance=Part-1-1
  8, 12
*Elset, elset=_PickedSet23, internal, instance=Part-1-1
 101,
*Nset, nset=_PickedSet24, internal, instance=Part-1-1
 2,
*End Assembly
**
** MATERIALS
**
*Material, name=steel
*Elastic
 2.06e+11, 0.3
** ----------------------------------------------------------------
**
** STEP: beam_2D
**
*Step, name=beam_2D, nlgeom=NO
*Static
1., 1., 1e-05, 1.
**
** BOUNDARY CONDITIONS
**
** Name: BC-1 Type: Displacement/Rotation
*Boundary
_PickedSet19, 1, 1
_PickedSet19, 2, 2
_PickedSet19, 3, 3
_PickedSet19, 4, 4
_PickedSet19, 5, 5
_PickedSet19, 6, 6
** Name: BC-2 Type: Displacement/Rotation
*Boundary
_PickedSet20, 1, 1
_PickedSet20, 2, 2
_PickedSet20, 3, 3
_PickedSet20, 4, 4
_PickedSet20, 5, 5
_PickedSet20, 6, 6
** Name: BC-3 Type: Displacement/Rotation
*Boundary
_PickedSet21, 1, 1
_PickedSet21, 2, 2
_PickedSet21, 3, 3
_PickedSet21, 4, 4
_PickedSet21, 5, 5
_PickedSet21, 6, 6
** Name: BC-4 Type: Displacement/Rotation
*Boundary
_PickedSet22, 1, 1
_PickedSet22, 2, 2
_PickedSet22, 3, 3
_PickedSet22, 4, 4
_PickedSet22, 5, 5
_PickedSet22, 6, 6
** Name: BC-5 Type: Displacement/Rotation
*Boundary
_PickedSet23, 1, 1
_PickedSet23, 2, 2
_PickedSet23, 3, 3
_PickedSet23, 4, 4
_PickedSet23, 5, 5
_PickedSet23, 6, 6
**
** LOADS
**
** Name: Load-1   Type: Concentrated force
*Cload
_PickedSet24, 2, -10000.
**
** OUTPUT REQUESTS
**
*Restart, write, frequency=0
**
** FIELD OUTPUT: F-Output-1
**
*Output, field, variable=PRESELECT
**
** HISTORY OUTPUT: H-Output-1
**
*Output, history, variable=PRESELECT
*End Step
